// SBML level 2 version 1

model PEAK3_Final_1()

  // Compartments:
  compartment rootCompartment = 1;

  // Species:
  substanceOnly species EGFR in rootCompartment = 100;
  substanceOnly species uEGFR in rootCompartment = 0;
  substanceOnly species pEGFR in rootCompartment = 0;
  substanceOnly species SFK in rootCompartment = 100;
  substanceOnly species aSFK in rootCompartment = 0;
  substanceOnly species Shc in rootCompartment = 100;
  substanceOnly species pShc in rootCompartment = 0;
  substanceOnly species PEAK3 in rootCompartment = 100;
  substanceOnly species PEAK3d in rootCompartment = 0;
  substanceOnly species Grb2 in rootCompartment = 100;
  substanceOnly species Grb2uPEAK3d in rootCompartment = 0;
  substanceOnly species Cbl in rootCompartment = 100;
  substanceOnly species PEAK3duCbl in rootCompartment = 0;
  substanceOnly species PYK2 in rootCompartment = 100;
  substanceOnly species PEAK3duPYK2 in rootCompartment = 0;
  substanceOnly species CrkII in rootCompartment = 100;
  substanceOnly species PEAK3duCrkII in rootCompartment = 0;
  substanceOnly species ASAP1 in rootCompartment = 100;
  substanceOnly species PEAK3duASAP1 in rootCompartment = 0;
  substanceOnly species Grb2upPEAK3d in rootCompartment = 0;
  substanceOnly species PTPN12 in rootCompartment = 100;
  substanceOnly species PTPN12upShc in rootCompartment = 0;
  substanceOnly species Grb2uPEAK3duPTPN12upShc in rootCompartment = 0;
  substanceOnly species Grb2upPEAK3duPTPN12upShc in rootCompartment = 0;
  substanceOnly species Grb2upPEAK3duASAP1 in rootCompartment = 0;
  substanceOnly species Grb2upPEAK3duCbl in rootCompartment = 0;
  substanceOnly species Grb2upPEAK3duPYK2 in rootCompartment = 0;
  substanceOnly species Grb2upPEAK3duCrkII in rootCompartment = 0;
  substanceOnly species Grb2uPEAK3duCbl in rootCompartment = 0;
  substanceOnly species Grb2uPEAK3duPYK2 in rootCompartment = 0;
  substanceOnly species Grb2uPEAK3duCrkII in rootCompartment = 0;
  substanceOnly species Grb2uPEAK3duASAP1 in rootCompartment = 0;

  // Parameters:
  Vmax1b = 10;
  Km1f = 100;
  Km1b = 100;
  Kc1f1 = 0.1;
  Kc1f2 = 0.1;
  Ki1f1 = 0.01;
  Ki1f2 = 0.01;
  Vmax2b = 10;
  Km2f = 100;
  Km2b = 100;
  Kc2f1 = 100;
  Vmax3b = 10;
  Km3f = 100;
  Km3b = 100;
  Kc3f1 = 1;
  Vmax4b = 10;
  Km4f = 100;
  Km4b = 100;
  Kc4f1 = 1;
  Ka5 = 0.001;
  Kd5 = 0.01;
  Ka6 = 0.001;
  Kd6 = 0.01;
  Ka7 = 0.01;
  Kd7 = 0.01;
  Ka8 = 0.001;
  Kd8 = 0.01;
  Ka9 = 0.001;
  Kd9 = 0.01;
  Ka10 = 1e-5;
  Kd10 = 0.0001;
  Vmax11b = 10;
  Km11f = 100;
  Km11b = 100;
  Kc11f1 = 0.1;
  Ka12 = 1;
  Kd12 = 100;
  Ka13 = 1;
  Kd13 = 100;
  Ka14 = 1;
  Kd14 = 100;
  Vmax15f = 10;
  Vmax15b = 10;
  Km15f = 100;
  Km15b = 100;
  Ka16 = 0.001;
  Kd16 = 0.01;
  Ka17 = 0.001;
  Kd17 = 0.01;
  Ka18 = 0.001;
  Kd18 = 0.01;
  Ka19 = 0.01;
  Kd19 = 0.01;
  Kdeg20 = 0.01;
  Ksyn21 = 0.01;
  Kdeg22 = 0.01;
  Kdeg23 = 0.01;
  Ka24 = 0.01;
  Kd24 = 0.01;
  Ka25 = 0.001;
  Kd25 = 0.01;
  Ka26 = 0.001;
  Kd26 = 0.01;
  Ka27 = 1e-5;
  Kd27 = 0.0001;
  EGF = 8.33;
  EGF_on = 5000;

  // Assignment rules:
  bindedASAP1 := Grb2uPEAK3duASAP1 + PEAK3duASAP1 + Grb2upPEAK3duASAP1;
  bindedCbl := PEAK3duCbl + Grb2uPEAK3duCbl + Grb2upPEAK3duCbl;
  bindedCrkII := PEAK3duCrkII + Grb2uPEAK3duCrkII + Grb2upPEAK3duCrkII;
  bindedPYK2 := PEAK3duPYK2 + Grb2uPEAK3duPYK2 + Grb2upPEAK3duPYK2;
  bindedGrb2 := Grb2uPEAK3d + Grb2uPEAK3duASAP1 + Grb2uPEAK3duCbl + Grb2uPEAK3duCrkII + Grb2uPEAK3duPTPN12upShc + Grb2uPEAK3duPYK2 + Grb2upPEAK3d + Grb2upPEAK3duASAP1 + Grb2upPEAK3duCbl + Grb2upPEAK3duCrkII + Grb2upPEAK3duPTPN12upShc + Grb2upPEAK3duPYK2;
  bindedpShc := Grb2uPEAK3duPTPN12upShc + Grb2upPEAK3duPTPN12upShc;
  EGF0 := EGF*piecewise(1, time >= EGF_on, 0);

  // Reactions:
  R1: EGFR => uEGFR; Kc1f1*(PEAK3duCbl + Grb2upPEAK3duCbl + Grb2uPEAK3duCbl)*EGFR/(Km1f + EGFR)*(1 + Ki1f1*(PEAK3duPYK2 + Grb2upPEAK3duPYK2 + Grb2uPEAK3duPYK2));  // modifiers: Grb2uPEAK3duCbl, Grb2uPEAK3duPYK2, Grb2upPEAK3duCbl, Grb2upPEAK3duPYK2, PEAK3duCbl, PEAK3duPYK2
  R2: EGFR -> pEGFR; Kc2f1*EGF0*EGFR/(Km2f + EGFR) - Vmax2b*pEGFR/(Km2b + pEGFR);
  R3: SFK -> aSFK; Kc3f1*pEGFR*SFK/(Km3f + SFK) - Vmax3b*aSFK/(Km3b + aSFK);  // modifiers: pEGFR
  R4: Shc -> pShc; Kc4f1*pEGFR*Shc/(Km4f + Shc) - Vmax4b*pShc/(Km4b + pShc);  // modifiers: pEGFR
  R5: 2 PEAK3 -> PEAK3d; Ka5*PEAK3*PEAK3 - Kd5*PEAK3d;
  R6: PEAK3d + Grb2 -> Grb2uPEAK3d; Ka6*Grb2*PEAK3d - Kd6*Grb2uPEAK3d;
  R7: PEAK3d + Cbl -> PEAK3duCbl; Ka7*PEAK3d*Cbl - Kd7*PEAK3duCbl;
  R8: PEAK3d + PYK2 -> PEAK3duPYK2; Ka8*PEAK3d*PYK2 - Kd8*PEAK3duPYK2;
  R9: PEAK3d + CrkII -> PEAK3duCrkII; Ka9*PEAK3d*CrkII - Kd9*PEAK3duCrkII;
  R10: PEAK3d + ASAP1 -> PEAK3duASAP1; Ka10*PEAK3d*ASAP1 - Kd10*PEAK3duASAP1;
  R11: Grb2uPEAK3d => Grb2upPEAK3d; Kc11f1*aSFK*Grb2uPEAK3d/(Km11f + Grb2uPEAK3d);  // modifiers: aSFK
  R12: pShc + PTPN12 -> PTPN12upShc; Ka12*PTPN12*pShc - Kd12*PTPN12upShc;
  R13: Grb2uPEAK3d + PTPN12upShc -> Grb2uPEAK3duPTPN12upShc; Ka13*Grb2uPEAK3d*PTPN12upShc - Kd13*Grb2uPEAK3duPTPN12upShc;
  R14: Grb2upPEAK3d + PTPN12upShc -> Grb2upPEAK3duPTPN12upShc; Ka14*Grb2upPEAK3d*PTPN12upShc - Kd14*Grb2upPEAK3duPTPN12upShc;
  R15: Grb2upPEAK3duPTPN12upShc => Grb2uPEAK3duPTPN12upShc; Vmax15f*Grb2upPEAK3duPTPN12upShc/(Km15f + Grb2upPEAK3duPTPN12upShc);
  R16: ASAP1 + Grb2upPEAK3d -> Grb2upPEAK3duASAP1; Ka16*ASAP1*Grb2upPEAK3d - Kd16*Grb2upPEAK3duASAP1;
  R17: Cbl + Grb2upPEAK3d -> Grb2upPEAK3duCbl; Ka17*Grb2upPEAK3d*Cbl - Kd17*Grb2upPEAK3duCbl;
  R18: PYK2 + Grb2upPEAK3d -> Grb2upPEAK3duPYK2; Ka18*Grb2upPEAK3d*PYK2 - Kd18*Grb2upPEAK3duPYK2;
  R19: CrkII + Grb2upPEAK3d -> Grb2upPEAK3duCrkII; Ka19*Grb2upPEAK3d*CrkII - Kd19*Grb2upPEAK3duCrkII;
  R20: uEGFR => ; Kdeg20*uEGFR;
  R21: => EGFR; Ksyn21;
  R22: EGFR => ; Kdeg22*EGFR;
  R23: pEGFR => ; Kdeg23*pEGFR;
  R24: Grb2uPEAK3d + Cbl -> Grb2uPEAK3duCbl; Ka24*Grb2uPEAK3d*Cbl - Kd24*Grb2uPEAK3duCbl;
  R25: Grb2uPEAK3d + PYK2 -> Grb2uPEAK3duPYK2; Ka25*Grb2uPEAK3d*PYK2 - Kd25*Grb2uPEAK3duPYK2;
  R26: Grb2uPEAK3d + CrkII -> Grb2uPEAK3duCrkII; Ka26*Grb2uPEAK3d*CrkII - Kd26*Grb2uPEAK3duCrkII;
  R27: Grb2uPEAK3d + ASAP1 -> Grb2uPEAK3duASAP1; Ka27*Grb2uPEAK3d*ASAP1 - Kd27*Grb2uPEAK3duASAP1;
end
