// SBML level 2 version 1

model PEAK3_Final_Ver4()

  // Compartments:
  compartment rootCompartment = 1;

  // Species:
  substanceOnly species EGFR in rootCompartment = 100;
  substanceOnly species uEGFR in rootCompartment = 0;
  substanceOnly species pEGFR in rootCompartment = 0;
  substanceOnly species SFK in rootCompartment = 100;
  substanceOnly species aSFK in rootCompartment = 0;
  substanceOnly species Shc in rootCompartment = 100;
  substanceOnly species pShc in rootCompartment = 0;
  substanceOnly species PEAK3 in rootCompartment = 100;
  substanceOnly species PEAK3d in rootCompartment = 0;
  substanceOnly species Grb2 in rootCompartment = 100;
  substanceOnly species Grb2uPEAK3d in rootCompartment = 0;
  substanceOnly species Cbl in rootCompartment = 100;
  substanceOnly species PEAK3duCbl in rootCompartment = 0;
  substanceOnly species PYK2 in rootCompartment = 100;
  substanceOnly species PEAK3duPYK2 in rootCompartment = 0;
  substanceOnly species CrkII in rootCompartment = 100;
  substanceOnly species PEAK3duCrkII in rootCompartment = 0;
  substanceOnly species ASAP1 in rootCompartment = 100;
  substanceOnly species PEAK3duASAP1 in rootCompartment = 0;
  substanceOnly species Grb2upPEAK3d in rootCompartment = 0;
  substanceOnly species pPEAK3d in rootCompartment = 0;
  substanceOnly species PTPN12 in rootCompartment = 100;
  substanceOnly species PTPN12upShc in rootCompartment = 0;
  substanceOnly species PEAK3duPTPN12upShc in rootCompartment = 0;
  substanceOnly species pPEAK3duPTPN12upShc in rootCompartment = 0;
  substanceOnly species Grb2upPEAK3duASAP1 in rootCompartment = 0;
  substanceOnly species Grb2upPEAK3duCbl in rootCompartment = 0;
  substanceOnly species Grb2upPEAK3duPYK2 in rootCompartment = 0;
  substanceOnly species Grb2upPEAK3duCrkII in rootCompartment = 0;
  substanceOnly species Grb2uPEAK3duPYK2 in rootCompartment = 0;
  substanceOnly species Grb2uPEAK3duCrkII in rootCompartment = 0;
  substanceOnly species Grb2uPEAK3duASAP1 in rootCompartment = 0;
  substanceOnly species Grb2uPEAK3duCbl in rootCompartment = 0;
  substanceOnly species pPEAK3duASAP1 in rootCompartment = 0;
  substanceOnly species pPEAK3duCbl in rootCompartment = 0;
  substanceOnly species pPEAK3duPYK2 in rootCompartment = 0;
  substanceOnly species pPEAK3duCrkII in rootCompartment = 0;

  // Parameters:
  Km1f = 100;
  Kc1f1 = 0.1;
  Ki1f1 = 0.01;
  Vmax2b = 10;
  Km2f = 100;
  Km2b = 100;
  Kc2f1 = 100;
  Vmax3b = 10;
  Km3f = 100;
  Km3b = 100;
  Kc3f1 = 1;
  Vmax4b = 10;
  Km4f = 100;
  Km4b = 100;
  Kc4f1 = 1;
  Ka5 = 0.001;
  Kd5 = 0.01;
  Ka6 = 0.001;
  Kd6 = 0.01;
  Ka7 = 0.01;
  Kd7 = 0.01;
  Ka8 = 0.001;
  Kd8 = 0.01;
  Ka9 = 0.001;
  Kd9 = 0.01;
  Ka10 = 0.001;
  Kd10 = 0.01;
  Km11f = 100;
  Kc11f1 = 0.1;
  Ka12 = 0.001;
  Kd12 = 0.01;
  Ka13 = 1;
  Kd13 = 100;
  Ka14 = 1;
  Kd14 = 100;
  Ka15 = 1;
  Kd15 = 100;
  Vmax16f = 10;
  Vmax16b = 10;
  Km16f = 100;
  Km16b = 100;
  Ka17 = 0.001;
  Kd17 = 0.01;
  Ka18 = 0.001;
  Kd18 = 0.01;
  Ka19 = 0.001;
  Kd19 = 0.01;
  Ka20 = 0.01;
  Kd20 = 0.01;
  Kdeg21 = 0.01;
  Ksyn22 = 0.01;
  Kdeg23 = 0.01;
  Kdeg24 = 0.01;
  Ka25 = 0.001;
  Kd25 = 0.01;
  Ka26 = 0.001;
  Kd26 = 0.01;
  Ka27 = 0.001;
  Kd27 = 0.01;
  Ka28 = 0.01;
  Kd28 = 0.01;
  Ka29 = 0.001;
  Kd29 = 0.01;
  Ka30 = 0.001;
  Kd30 = 0.01;
  Ka31 = 0.001;
  Kd31 = 0.01;
  Ka32 = 0.01;
  Kd32 = 0.01;
  EGF = 8.33;
  Timeinput1 = 5000;

  // Assignment rules:
  boundASAP1 := Grb2uPEAK3duASAP1 + PEAK3duASAP1 + Grb2upPEAK3duASAP1 + pPEAK3duASAP1;
  boundCbl := PEAK3duCbl + Grb2uPEAK3duCbl + Grb2upPEAK3duCbl + pPEAK3duCbl;
  boundCrkII := PEAK3duCrkII + Grb2uPEAK3duCrkII + Grb2upPEAK3duCrkII + pPEAK3duCrkII;
  boundPYK2 := PEAK3duPYK2 + Grb2uPEAK3duPYK2 + Grb2upPEAK3duPYK2 + pPEAK3duPYK2;
  boundGrb2 := Grb2uPEAK3d + Grb2uPEAK3duASAP1 + Grb2uPEAK3duCbl + Grb2uPEAK3duCrkII + Grb2uPEAK3duPYK2 + Grb2upPEAK3d + Grb2upPEAK3duASAP1 + Grb2upPEAK3duCbl + Grb2upPEAK3duCrkII + Grb2upPEAK3duPYK2;
  boundpShc := PEAK3duPTPN12upShc + pPEAK3duPTPN12upShc;
  EGF0 := EGF*piecewise(1, time >= Timeinput1, 0);

  // Reactions:
  R1: EGFR => uEGFR; Kc1f1*(PEAK3duCbl + Grb2upPEAK3duCbl + Grb2uPEAK3duCbl + pPEAK3duCbl)*EGFR/(Km1f + EGFR)*(1 + Ki1f1*(PEAK3duPYK2 + Grb2upPEAK3duPYK2 + Grb2uPEAK3duPYK2 + pPEAK3duPYK2));  // modifiers: Grb2uPEAK3duCbl, Grb2uPEAK3duPYK2, Grb2upPEAK3duCbl, Grb2upPEAK3duPYK2, PEAK3duCbl, PEAK3duPYK2, pPEAK3duCbl, pPEAK3duPYK2
  R2: EGFR -> pEGFR; Kc2f1*EGF0*EGFR/(Km2f + EGFR) - Vmax2b*pEGFR/(Km2b + pEGFR);
  R3: SFK -> aSFK; Kc3f1*pEGFR*SFK/(Km3f + SFK) - Vmax3b*aSFK/(Km3b + aSFK);  // modifiers: pEGFR
  R4: Shc -> pShc; Kc4f1*pEGFR*Shc/(Km4f + Shc) - Vmax4b*pShc/(Km4b + pShc);  // modifiers: pEGFR
  R5: 2 PEAK3 -> PEAK3d; Ka5*PEAK3*PEAK3 - Kd5*PEAK3d;
  R6: PEAK3d + Grb2 -> Grb2uPEAK3d; Ka6*Grb2*PEAK3d - Kd6*Grb2uPEAK3d;
  R7: PEAK3d + Cbl -> PEAK3duCbl; Ka7*PEAK3d*Cbl - Kd7*PEAK3duCbl;
  R8: PEAK3d + PYK2 -> PEAK3duPYK2; Ka8*PEAK3d*PYK2 - Kd8*PEAK3duPYK2;
  R9: PEAK3d + CrkII -> PEAK3duCrkII; Ka9*PEAK3d*CrkII - Kd9*PEAK3duCrkII;
  R10: PEAK3d + ASAP1 -> PEAK3duASAP1; Ka10*PEAK3d*ASAP1 - Kd10*PEAK3duASAP1;
  R11: Grb2uPEAK3d => Grb2upPEAK3d; Kc11f1*aSFK*Grb2uPEAK3d/(Km11f + Grb2uPEAK3d);  // modifiers: aSFK
  R12: Grb2 + pPEAK3d -> Grb2uPEAK3d; Ka12*Grb2*pPEAK3d - Kd12*Grb2uPEAK3d;
  R13: pShc + PTPN12 -> PTPN12upShc; Ka13*PTPN12*pShc - Kd13*PTPN12upShc;
  R14: PEAK3d + PTPN12upShc -> PEAK3duPTPN12upShc; Ka14*PEAK3d*PTPN12upShc - Kd14*PEAK3duPTPN12upShc;
  R15: pPEAK3d + PTPN12upShc -> pPEAK3duPTPN12upShc; Ka15*pPEAK3d*PTPN12upShc - Kd15*pPEAK3duPTPN12upShc;
  R16: pPEAK3duPTPN12upShc => PEAK3duPTPN12upShc; Vmax16f*pPEAK3duPTPN12upShc/(Km16f + pPEAK3duPTPN12upShc);
  R17: ASAP1 + Grb2upPEAK3d -> Grb2upPEAK3duASAP1; Ka17*Grb2upPEAK3d*ASAP1 - Kd17*Grb2upPEAK3duASAP1;
  R18: Cbl + Grb2upPEAK3d -> Grb2upPEAK3duCbl; Ka18*Grb2upPEAK3d*Cbl - Kd18*Grb2upPEAK3duCbl;
  R19: PYK2 + Grb2upPEAK3d -> Grb2upPEAK3duPYK2; Ka19*Grb2upPEAK3d*PYK2 - Kd19*Grb2upPEAK3duPYK2;
  R20: CrkII + Grb2upPEAK3d -> Grb2upPEAK3duCrkII; Ka20*Grb2upPEAK3d*CrkII - Kd20*Grb2upPEAK3duCrkII;
  R21: uEGFR => ; Kdeg21*uEGFR;
  R22: => EGFR; Ksyn22;
  R23: EGFR => ; 0.01*Kdeg23*EGFR;
  R24: pEGFR => ; 0.01*Kdeg24*pEGFR;
  R25: Grb2uPEAK3d + PYK2 -> Grb2uPEAK3duPYK2; Ka25*Grb2uPEAK3d*PYK2 - Kd25*Grb2uPEAK3duPYK2;
  R26: Grb2uPEAK3d + CrkII -> Grb2uPEAK3duCrkII; Ka26*Grb2uPEAK3d*CrkII - Kd26*Grb2uPEAK3duCrkII;
  R27: Grb2uPEAK3d + ASAP1 -> Grb2uPEAK3duASAP1; Ka27*Grb2uPEAK3d*ASAP1 - Kd27*Grb2uPEAK3duASAP1;
  R28: Grb2uPEAK3d + Cbl -> Grb2uPEAK3duCbl; Ka28*Grb2uPEAK3d*Cbl - Kd28*Grb2uPEAK3duCbl;
  R29: ASAP1 + pPEAK3d -> pPEAK3duASAP1; Ka29*pPEAK3d*ASAP1 - Kd29*pPEAK3duASAP1;
  R30: Cbl + pPEAK3d -> pPEAK3duCbl; Ka30*pPEAK3d*Cbl - Kd30*pPEAK3duCbl;
  R31: PYK2 + pPEAK3d -> pPEAK3duPYK2; Ka31*pPEAK3d*PYK2 - Kd31*pPEAK3duPYK2;
  R32: CrkII + pPEAK3d -> pPEAK3duCrkII; Ka32*pPEAK3d*CrkII - Kd32*pPEAK3duCrkII;
end
